*Heading
** Job name: Job-1_buckling Model name: Model-1
** Generated by: Abaqus/CAE 2021
*Preprint, echo=NO, model=NO, history=NO, contact=NO
**
** PARTS
**
*Part, name=Part-1
*Node
      1,        -127.,        -127.,           0.
      2,  -110.066666,        -127.,           0.
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*Element, type=S4
  1,   1,   2,  18,  17
  2,   2,   3,  19,  18
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*Nset, nset=_PickedSet2, internal, generate
   1,  256,    1
*Elset, elset=_PickedSet2, internal, generate
   1,  225,    1
*Orientation, name=Ori-1
1., 0., 0., 0., 1., 0.
1, 0.
** Section: Section-1
*Shell Section, elset=_PickedSet2, material=Material-1, orientation=Ori-1
1.016, 5
*Transverse Shear Stiffness
1e+09, 1e+09, 0.
*End Part
**
**
** ASSEMBLY
**
*Assembly, name=Assembly
**
*Instance, name=Part-1-1, part=Part-1
*End Instance
**
*Nset, nset=_PickedSet6, internal, instance=Part-1-1, generate
 241,  256,    1
*Elset, elset=_PickedSet6, internal, instance=Part-1-1, generate
 211,  225,    1
*Nset, nset=_PickedSet7, internal, instance=Part-1-1
   1,   2,   3,   4,   5,   6
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*Elset, elset=_PickedSet7, internal, instance=Part-1-1
   1,   2,   3,   4,   5,   6
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*Nset, nset=_PickedSet8, internal, instance=Part-1-1
   1,  16,  17,  32,  33,  48
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*Elset, elset=_PickedSet8, internal, instance=Part-1-1
   1,  15,  16,  30,  31,  45
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*Nset, nset=_PickedSet9, internal, instance=Part-1-1, generate
  1,  16,   1
*Elset, elset=_PickedSet9, internal, instance=Part-1-1, generate
  1,  15,   1
*Elset, elset=__PickedSurf10_E3, internal, instance=Part-1-1, generate
 211,  225,    1
*Surface, type=ELEMENT, name=_PickedSurf10, internal
__PickedSurf10_E3, E3
*End Assembly
**
** MATERIALS
**
*Material, name=Material-1
*Depvar
      1,
*User Material, constants=10
181000., 10273.,   0.28, 7170.5,     0.,    75.,     0.,   254.
  1.016,     0.
**
** BOUNDARY CONDITIONS
**
** Name: BC-1 Type: Displacement/Rotation
*Boundary
_PickedSet9, 2, 2
** Name: BC-2 Type: Displacement/Rotation
*Boundary
_PickedSet7, 1, 1
_PickedSet7, 3, 3
_PickedSet7, 5, 5
_PickedSet7, 6, 6
** Name: BC-4 Type: Displacement/Rotation
*Boundary
_PickedSet8, 3, 3
_PickedSet8, 4, 4
_PickedSet8, 6, 6
** ----------------------------------------------------------------
**
** STEP: Step-1
**
*Step, name=Step-1, nlgeom=NO, perturbation
*Buckle
3, , 10, 1000
**
** BOUNDARY CONDITIONS
**
** Name: BC-1 Type: Displacement/Rotation
*Boundary, op=NEW, load case=1
_PickedSet9, 2, 2
*Boundary, op=NEW, load case=2
_PickedSet9, 2, 2
** Name: BC-2 Type: Displacement/Rotation
*Boundary, op=NEW, load case=1
_PickedSet7, 1, 1
_PickedSet7, 3, 3
_PickedSet7, 5, 5
_PickedSet7, 6, 6
*Boundary, op=NEW, load case=2
_PickedSet7, 1, 1
_PickedSet7, 3, 3
_PickedSet7, 5, 5
_PickedSet7, 6, 6
** Name: BC-3 Type: Displacement/Rotation
*Boundary, op=NEW, load case=1
_PickedSet6, 2, 2, -1.
*Boundary, op=NEW, load case=2
_PickedSet6, 2, 2, -1.
** Name: BC-4 Type: Displacement/Rotation
*Boundary, op=NEW, load case=1
_PickedSet8, 3, 3
_PickedSet8, 4, 4
_PickedSet8, 6, 6
*Boundary, op=NEW, load case=2
_PickedSet8, 3, 3
_PickedSet8, 4, 4
_PickedSet8, 6, 6
**
** OUTPUT REQUESTS
**
*Restart, write, frequency=0
**
** FIELD OUTPUT: F-Output-1
**
*Output, field
*Node Output
RF, U
*Element Output, directions=YES
SDV,
*End Step
